<!--Taken from https://github.com/DeLaVlag/tvb-root/blob/master/scientific_library/tvb/rateML/XMLmodels/oscillator.xml -->
<Lems description="Generic2dOscillator">

    <ComponentType name="derivatives">

        <!-- Parameters will be assumed to be swept. sweep data will be matched by order of entry -->
        <Parameter name="global_speed" dimension='1.0, 1.0'/>
        <Parameter name="global_coupling" dimension='1.0, 1.0'/>
<!--        <Parameter name="global_test" dimension='606, 666'/>-->

        <DerivedParameter name="rec_n" value="1 / n_node"/>
        <DerivedParameter name="rec_speed_dt" value="1.0f / global_speed / (dt)"/>
        <DerivedParameter name="nsig" value="sqrt(dt) * sqrt(2.0 * 1e-3)"/>
        <DerivedParameter name="local_coupling" value="0.0"/>

        <Constant name="tau" dimension="" value="1.0"
              description="A time-scale hierarchy can be introduced for the state variables :math:`V` and :math:`W`. Default parameter is 1, which means no time-scale hierarchy."/>
        <Constant name="I" dimension="" value="0.1" description="Baseline shift of the cubic nullcline"/>
        <Constant name="a" dimension="" value="0.5" description="Vertical shift of the configurable nullcline"/>
        <Constant name="b" dimension="" value="0.4" description="Linear slope of the configurable nullcline"/>
        <Constant name="c" dimension="" value="-4.0" description="Parabolic term of the configurable nullcline"/>
        <Constant name="d" dimension="" value="0.02" description="Temporal scale factor. Warning: do not use it unless you know what you are doing and know about time tides."/>
        <Constant name="e" dimension="" value="3.0" description="Coefficient of the quadratic term of the cubic nullcline."/>
        <Constant name="f" dimension="" value="1.0" description="Coefficient of the cubic term of the cubic nullcline."/>
        <Constant name="g" dimension="" value="0.0" description="Coefficient of the linear term of the cubic nullcline."/>
        <Constant name="alpha" dimension="" value="1.0" description="Constant parameter to scale the rate of feedback from the slow variable to the fast variable."/>
        <Constant name="beta" dimension="" value="1.0" description="Constant parameter to scale the rate of feedback from the slow variable to itself"/>
        <Constant name="gamma" dimension="" value="1.0" description="Constant parameter to reproduce FHN dynamics where excitatory input currents are negative.
            It scales both I and the long range coupling term.."/>

        <!-- Exposures are used for observables, for the name enter variable to be observed (usually states)
        and for dimension enter the reduction functionality-->
        <Exposure name="V" dimension="V"/>
        <Exposure name="W" dimension="W"/>

        <Dynamics>
            <!-- For python models a dimension range is required -->
<!--            <StateVariable name="V" dimension="-2.0, 4.0" exposure="-2.0, 4.0"/>-->
<!--            <StateVariable name="W" dimension="-6.0, 6.0" exposure="-6.0, 6.0"/>-->
            <!-- For CUDA models a single value for dimension is required -->
            <StateVariable name="V" dimension="0.0" exposure="-2.0, 4.0"/>
            <StateVariable name="W" dimension="0.0" exposure="-6.0, 6.0"/>

            <TimeDerivative variable="dV" value="d * tau * (alpha * W - f * {V^3} + e * {V^2} + g * V + gamma * I + gamma * c_pop0 * V)"/>
            <TimeDerivative variable="dW" value="d * (a + b * V + c * {V^2} - beta * W) / tau"/>
        </Dynamics>

    </ComponentType>

    <ComponentType name="coupling_function">

<!--        variables for pre synaptic function-->
        <Parameter name="V_j" dimension='0'/>

        <!-- Handle local coupling result, full expression is 'name' *= 'expression'-->
        <DerivedParameter name="c_pop0" value="global_coupling"/>

        <!-- Used in coupling -->
        <Constant name="c_a" dimension="" value="1" description="Rescales the connection strength."/>

        <!-- variables for post synaptic function-->
        <!-- <Requirement name="wij" dimension=''/>-->
        <Dynamics>
            <DerivedVariable name="pre" value="V_j"/>
            <DerivedVariable name="post" value="c_a"/>
        </Dynamics>

    </ComponentType>

<!--    <ComponentType name="noise"/>-->

  <Component id="generic2doscillator" type="G2DOS" tau="1.0" I="0.0" a="-2.0" b="-10.0" c="0.0" d="0.02" e="3.0" f="1.0" g="0.0" alpha="1.0" beta="1.0" gamma="1.0"/>
</Lems>
